# LAMMPS input for backmapping — generated by backmap-prep, validated
# 2026-07-28 against the bakery/ESPResSo++-faithful protocol. See
# research/checkpoints.md for the checkpoint history and
# research/experiments/20260728_pet-regen-cg-integration-root-cause.md
# for the full root-cause writeup of what makes this protocol work where
# several plausible-looking variants did not.
#
# Structure (no Phase 0 minimize — matches
# decisions/2026-07-19-prefer-bakery-protocol-no-frozen-cg.md and the
# original ESPResSo++ start_backmapping.py driver):
#   Stage 1 — CG+AT equilibration at lambda=0. AT intra-bead (same CG
#             bead / same-molecule) bonded and nonbonded terms are ALWAYS
#             fully active, independent of lambda; CG-CG is at full
#             strength at lambda=0.
#   Stage 2 — lambda ramp. fix backmap becomes active and drives the CG
#             bead position via COM-shift toward the AT center of mass
#             (not by independent CG force integration); inter-bead AT-AT
#             and CG-CG terms fade in/out with lambda.
#   Stage 3 — AT production at lambda=1 (fix backmap stays active, pinned
#             at lambda=1 once the ramp saturates).
#
# Two things this protocol gets right that are easy to get wrong (both
# caused hours of debugging on 2026-07-27/28 before being found by
# diffing fix declarations against the last known-good run):
#   - CG beads have NO independent integrator or thermostat (no
#     nve/limit, no langevin/nvt on cg_atoms). Their motion comes
#     entirely from fix backmap's own COM-tracking (end_of_step()
#     directly repositions CG beads and zeroes any force accumulated on
#     them). Giving CG beads independent thermal momentum makes them
#     fight fix backmap's COM-restraint the moment it activates.
#   - Initial velocities are NOT independent per-atom `velocity create`.
#     They use the bakery scheme (pet_bakery_velocities.py): one
#     Maxwell-Boltzmann draw per CG bead, copied to every atom (CG + all
#     its AT atoms) in that bead's fragment. Independent per-atom
#     velocities inject spurious internal relative motion within each
#     bead from step 0.
#
# Reference: Krajniak et al., JCTC 2016, DOI: 10.1021/acs.jctc.6b00595
#            Krajniak, Zhang et al., JCC 2018, DOI: 10.1002/jcc.25129
#
# Stage step counts default to the validated pilot (2000/10000/10000);
# override with -var NAME VALUE on the command line for longer runs, e.g.:
#   mpirun -np 8 lmp -in in.pet \
#     -var eq_steps 20000 -var ramp_steps 10000 -var prod_steps 200000

variable eq_steps   index 2000
variable ramp_steps index 10000
variable prod_steps index 10000

units real
atom_style full
boundary p p p

read_data pet.data
reset_atoms image all

comm_modify cutoff 100.89

pair_style backmap 12.00 lj/cut/coul/cut/ecap 12.00 9.00 14.00 table linear 1000
pair_coeff 1 1 cg table_E_E.table ENTRY
pair_coeff 1 2 none
pair_coeff 1 3 none
pair_coeff 1 4 none
pair_coeff 1 5 none
pair_coeff 1 6 cg table_D_E.table ENTRY
pair_coeff 1 7 cg table_C_E.table ENTRY
pair_coeff 1 8 none
pair_coeff 1 9 none
pair_coeff 1 10 none
pair_coeff 1 11 cg table_B_E.table ENTRY
pair_coeff 1 12 none
pair_coeff 1 13 none
pair_coeff 1 14 cg table_A_E.table ENTRY
pair_coeff 1 15 none
pair_coeff 1 16 cg table_E_W.table ENTRY
pair_coeff 1 17 none
pair_coeff 1 18 none
pair_coeff 2 2 atomistic 0.066000 3.500000
pair_coeff 2 3 atomistic 0.044497 3.000000
pair_coeff 2 4 atomistic 0.105925 3.310000
pair_coeff 2 5 atomistic 0.000000 0.000000
pair_coeff 2 6 none
pair_coeff 2 7 none
pair_coeff 2 8 atomistic 0.105925 3.250000
pair_coeff 2 9 atomistic 0.083247 3.625000
pair_coeff 2 10 atomistic 0.117729 3.230000
pair_coeff 2 11 none
pair_coeff 2 12 atomistic 0.067971 3.525000
pair_coeff 2 13 atomistic 0.044497 2.960000
pair_coeff 2 14 none
pair_coeff 2 15 atomistic 0.000000 0.000000
pair_coeff 2 16 none
pair_coeff 2 17 atomistic 0.101274 3.332785
pair_coeff 2 18 atomistic 0.000000 0.000000
pair_coeff 3 3 atomistic 0.030000 2.500000
pair_coeff 3 4 atomistic 0.071414 2.810000
pair_coeff 3 5 atomistic 0.000000 0.000000
pair_coeff 3 6 none
pair_coeff 3 7 none
pair_coeff 3 8 atomistic 0.071414 2.750000
pair_coeff 3 9 atomistic 0.056125 3.125000
pair_coeff 3 10 atomistic 0.079373 2.730000
pair_coeff 3 11 none
pair_coeff 3 12 atomistic 0.045826 3.025000
pair_coeff 3 13 atomistic 0.030000 2.460000
pair_coeff 3 14 none
pair_coeff 3 15 atomistic 0.000000 0.000000
pair_coeff 3 16 none
pair_coeff 3 17 atomistic 0.068279 2.832785
pair_coeff 3 18 atomistic 0.000000 0.000000
pair_coeff 4 4 atomistic 0.170000 3.120000
pair_coeff 4 5 atomistic 0.000000 0.000000
pair_coeff 4 6 none
pair_coeff 4 7 none
pair_coeff 4 8 atomistic 0.170000 3.060000
pair_coeff 4 9 atomistic 0.133604 3.435000
pair_coeff 4 10 atomistic 0.188945 3.040000
pair_coeff 4 11 none
pair_coeff 4 12 atomistic 0.109087 3.335000
pair_coeff 4 13 atomistic 0.071414 2.770000
pair_coeff 4 14 none
pair_coeff 4 15 atomistic 0.000000 0.000000
pair_coeff 4 16 none
pair_coeff 4 17 atomistic 0.162536 3.142785
pair_coeff 4 18 atomistic 0.000000 0.000000
pair_coeff 5 5 atomistic 0.000000 0.000000
pair_coeff 5 6 none
pair_coeff 5 7 none
pair_coeff 5 8 atomistic 0.000000 0.000000
pair_coeff 5 9 atomistic 0.000000 0.000000
pair_coeff 5 10 atomistic 0.000000 0.000000
pair_coeff 5 11 none
pair_coeff 5 12 atomistic 0.000000 0.000000
pair_coeff 5 13 atomistic 0.000000 0.000000
pair_coeff 5 14 none
pair_coeff 5 15 atomistic 0.000000 0.000000
pair_coeff 5 16 none
pair_coeff 5 17 atomistic 0.000000 0.000000
pair_coeff 5 18 atomistic 0.000000 0.000000
pair_coeff 6 6 cg table_D_D.table ENTRY
pair_coeff 6 7 cg table_C_D.table ENTRY
pair_coeff 6 8 none
pair_coeff 6 9 none
pair_coeff 6 10 none
pair_coeff 6 11 cg table_B_D.table ENTRY
pair_coeff 6 12 none
pair_coeff 6 13 none
pair_coeff 6 14 cg table_A_D.table ENTRY
pair_coeff 6 15 none
pair_coeff 6 16 cg table_D_W.table ENTRY
pair_coeff 6 17 none
pair_coeff 6 18 none
pair_coeff 7 7 cg table_C_C.table ENTRY
pair_coeff 7 8 none
pair_coeff 7 9 none
pair_coeff 7 10 none
pair_coeff 7 11 cg table_B_C.table ENTRY
pair_coeff 7 12 none
pair_coeff 7 13 none
pair_coeff 7 14 cg table_A_C.table ENTRY
pair_coeff 7 15 none
pair_coeff 7 16 cg table_C_W.table ENTRY
pair_coeff 7 17 none
pair_coeff 7 18 none
pair_coeff 8 8 atomistic 0.170000 3.000000
pair_coeff 8 9 atomistic 0.133604 3.375000
pair_coeff 8 10 atomistic 0.188945 2.980000
pair_coeff 8 11 none
pair_coeff 8 12 atomistic 0.109087 3.275000
pair_coeff 8 13 atomistic 0.071414 2.710000
pair_coeff 8 14 none
pair_coeff 8 15 atomistic 0.000000 0.000000
pair_coeff 8 16 none
pair_coeff 8 17 atomistic 0.162536 3.082785
pair_coeff 8 18 atomistic 0.000000 0.000000
pair_coeff 9 9 atomistic 0.105000 3.750000
pair_coeff 9 10 atomistic 0.148493 3.355000
pair_coeff 9 11 none
pair_coeff 9 12 atomistic 0.085732 3.650000
pair_coeff 9 13 atomistic 0.056125 3.085000
pair_coeff 9 14 none
pair_coeff 9 15 atomistic 0.000000 0.000000
pair_coeff 9 16 none
pair_coeff 9 17 atomistic 0.127738 3.457785
pair_coeff 9 18 atomistic 0.000000 0.000000
pair_coeff 10 10 atomistic 0.210000 2.960000
pair_coeff 10 11 none
pair_coeff 10 12 atomistic 0.121244 3.255000
pair_coeff 10 13 atomistic 0.079373 2.690000
pair_coeff 10 14 none
pair_coeff 10 15 atomistic 0.000000 0.000000
pair_coeff 10 16 none
pair_coeff 10 17 atomistic 0.180649 3.062785
pair_coeff 10 18 atomistic 0.000000 0.000000
pair_coeff 11 11 cg table_B_B.table ENTRY
pair_coeff 11 12 none
pair_coeff 11 13 none
pair_coeff 11 14 cg table_A_B.table ENTRY
pair_coeff 11 15 none
pair_coeff 11 16 cg table_B_W.table ENTRY
pair_coeff 11 17 none
pair_coeff 11 18 none
pair_coeff 12 12 atomistic 0.070000 3.550000
pair_coeff 12 13 atomistic 0.045826 2.985000
pair_coeff 12 14 none
pair_coeff 12 15 atomistic 0.000000 0.000000
pair_coeff 12 16 none
pair_coeff 12 17 atomistic 0.104298 3.357785
pair_coeff 12 18 atomistic 0.000000 0.000000
pair_coeff 13 13 atomistic 0.030000 2.420000
pair_coeff 13 14 none
pair_coeff 13 15 atomistic 0.000000 0.000000
pair_coeff 13 16 none
pair_coeff 13 17 atomistic 0.068279 2.792785
pair_coeff 13 18 atomistic 0.000000 0.000000
pair_coeff 14 14 cg table_A_A.table ENTRY
pair_coeff 14 15 none
pair_coeff 14 16 cg table_A_W.table ENTRY
pair_coeff 14 17 none
pair_coeff 14 18 none
pair_coeff 15 15 atomistic 0.000000 0.000000
pair_coeff 15 16 none
pair_coeff 15 17 atomistic 0.000000 0.000000
pair_coeff 15 18 atomistic 0.000000 0.000000
pair_coeff 16 16 cg table_W_W.table ENTRY
pair_coeff 16 17 none
pair_coeff 16 18 none
pair_coeff 17 17 atomistic 0.155400 3.165570
pair_coeff 17 18 atomistic 0.000000 0.000000
pair_coeff 18 18 atomistic 0.000000 0.000000

bond_style backmap/harmonic
bond_coeff 1 at 268.000296 1.520000
bond_coeff 2 at 340.000376 1.100000
bond_coeff 3 at 340.000376 1.090000
bond_coeff 4 at 320.000354 1.420000
bond_coeff 5 at 553.000610 0.970000
bond_coeff 6 at 450.000497 1.350000
bond_coeff 7 at 570.000629 1.220000
bond_coeff 8 at 469.000518 1.400000
bond_coeff 9 at 367.000405 1.090000
bond_coeff 10 at 469.000518 1.410000
bond_coeff 11 at 367.000405 1.080000
bond_coeff 12 at 553.000610 0.980000
bond_coeff 13 at 412.285350 1.000000
bond_coeff 14 cg 65.116229 2.563950
bond_coeff 15 at 0.000000 0.000000
bond_coeff 16 cg 93.986719 3.387400
bond_coeff 17 at 400.000442 1.480000
bond_coeff 18 at 400.000442 1.500000
bond_coeff 19 cg 74.093055 3.447900

angle_style hybrid backmap/harmonic backmap/table linear 1000
angle_coeff 1 backmap/harmonic at 37.500042 110.4070
angle_coeff 2 backmap/harmonic at 37.500042 110.3880
angle_coeff 3 backmap/harmonic at 37.500042 110.4140
angle_coeff 4 backmap/harmonic at 37.500042 110.4210
angle_coeff 5 backmap/harmonic at 33.000037 107.6660
angle_coeff 6 backmap/harmonic at 33.000037 107.6140
angle_coeff 7 backmap/harmonic at 50.000055 110.1050
angle_coeff 8 backmap/harmonic at 55.000060 106.6230
angle_coeff 9 backmap/harmonic at 35.000039 109.1560
angle_coeff 10 backmap/harmonic at 35.000039 109.1180
angle_coeff 11 backmap/harmonic at 50.000055 110.0920
angle_coeff 12 backmap/harmonic at 35.000039 109.1220
angle_coeff 13 backmap/harmonic at 35.000039 109.0740
angle_coeff 14 backmap/harmonic at 55.000060 106.6330
angle_coeff 15 backmap/harmonic at 23.900600 121.3790
angle_coeff 16 backmap/harmonic at 63.000070 120.1030
angle_coeff 17 backmap/harmonic at 35.000039 120.4350
angle_coeff 18 backmap/harmonic at 63.000070 120.5720
angle_coeff 19 backmap/harmonic at 35.000039 120.3420
angle_coeff 20 backmap/harmonic at 63.000070 119.3370
angle_coeff 21 backmap/harmonic at 63.000070 121.0070
angle_coeff 22 backmap/harmonic at 35.000039 118.8410
angle_coeff 23 backmap/harmonic at 35.000039 119.4610
angle_coeff 24 backmap/harmonic at 63.000070 118.6300
angle_coeff 25 backmap/harmonic at 35.000039 120.1510
angle_coeff 26 backmap/harmonic at 63.000070 120.3500
angle_coeff 27 backmap/harmonic at 35.000039 122.8740
angle_coeff 28 backmap/harmonic at 35.000039 119.0860
angle_coeff 29 backmap/harmonic at 35.000039 116.7760
angle_coeff 30 backmap/harmonic at 23.900600 121.4750
angle_coeff 31 backmap/harmonic at 35.000039 103.7350
angle_coeff 32 backmap/harmonic at 35.000039 118.1660
angle_coeff 33 backmap/harmonic at 45.769649 109.4700
angle_coeff 34 backmap/table cg table_a2.table ENTRY
angle_coeff 35 backmap/table cg table_a3.table ENTRY
angle_coeff 36 backmap/table cg table_a0.table ENTRY
angle_coeff 37 backmap/harmonic at 70.000078 112.7040
angle_coeff 38 backmap/harmonic at 85.000094 118.4640
angle_coeff 39 backmap/harmonic at 85.000094 122.1990
angle_coeff 40 backmap/harmonic at 80.000089 125.9170
angle_coeff 41 backmap/harmonic at 85.000094 116.7840
angle_coeff 42 backmap/harmonic at 70.000078 116.7270
angle_coeff 43 backmap/harmonic at 80.000089 121.7980
angle_coeff 44 backmap/harmonic at 85.000094 124.5850
angle_coeff 45 backmap/table cg table_a1.table ENTRY

dihedral_style hybrid ryckaert harmonic backmap/ryckaert backmap/harmonic backmap/table linear 1000
dihedral_coeff 1 ryckaert 0.150000 -0.450000 0.000000 0.600001 0.000000 -0.000000
dihedral_coeff 2 ryckaert -0.105999 -0.916002 0.173999 0.984000 0.000000 -0.000000
dihedral_coeff 3 ryckaert 0.233999 -0.701999 0.000000 0.936000 0.000000 -0.000000
dihedral_coeff 4 ryckaert 0.225000 -0.675001 0.000000 0.900001 0.000000 -0.000000
dihedral_coeff 5 ryckaert 4.533005 4.533005 0.000000 -0.000000 0.000000 -0.000000
dihedral_coeff 6 ryckaert 7.250008 -0.000000 -7.250008 -0.000000 0.000000 -0.000000
dihedral_coeff 7 harmonic 1.100001 -1 2
dihedral_coeff 8 ryckaert 5.000006 -0.000000 -5.000006 -0.000000 0.000000 -0.000000
dihedral_coeff 9 backmap/table cg table_d0.table ENTRY
dihedral_coeff 10 backmap/table cg table_d1.table ENTRY
dihedral_coeff 11 backmap/ryckaert at 2.100002 -0.000000 -2.100002 -0.000000 0.000000 -0.000000
dihedral_coeff 12 backmap/harmonic at 10.500012 -1 2
dihedral_coeff 13 backmap/ryckaert at 7.250008 -0.000000 -7.250008 -0.000000 0.000000 -0.000000
dihedral_coeff 14 backmap/harmonic at 1.100001 -1 2
dihedral_coeff 15 backmap/ryckaert at 7.000008 2.000002 -5.000006 -0.000000 0.000000 -0.000000

special_bonds lj 0.0 0.0 0.0 coul 0.0 0.0 0.0

group at_atoms type 2 3 4 5 8 9 10 12 13 15 17 18
group cg_atoms type 1 6 7 11 14 16

neigh_modify delay 0 every 1 check yes

# Bakery velocity: one Maxwell-Boltzmann draw per bead, shared by CG+AT
# (regenerate with pet_bakery_velocities.py pet.data pet_vel.bakery.dump)
read_dump pet_vel.bakery.dump 0 vx vy vz box no replace yes format native

fix integrate_at at_atoms nve
fix therm_at at_atoms langevin 298.0 298.0 33.333333 48279

fix bm all backmap cg_type 1 6 7 11 14 16 alpha 0.0001 lambda0 0.0 nonuniform no
fix pairs all backmap/pairs at file pairs.dat cut 12.000000
fix cap all backmap/capforce 1195.0300
# SHAKE placed AFTER bm/pairs/cap: must see the complete final force
# (post CG->AT redistribution + CapForce clipping), not an incomplete
# picture -- established finding, 20260723_pet-lambda0-shake-fix-order.md
fix shake_xh at_atoms shake 0.0001 20 0 b 2 3 5 9 11 12 13
fix_modify bm active no

compute at_temp at_atoms temp
compute cg_temp cg_atoms temp

thermo 100
thermo_style custom step temp c_at_temp c_cg_temp pe epair ebond eangle edihed f_bm f_cap f_cap[2]
thermo_modify colname f_bm lambda
thermo_modify colname f_cap ncapped
thermo_modify colname f_cap[2] Fobs
thermo_modify temp at_temp
thermo_modify lost ignore

dump traj all custom 1000 dump.backmap id mol type x y z f_bm
dump_modify traj sort id

timestep 1.00

# --- Stage 1: lambda=0 equilibration (no Phase 0 minimize) ---
run ${eq_steps}
print "EQ done step=$(step) T=$(c_at_temp) Ebond=$(ebond) Eangle=$(eangle)"

# --- Stage 2: lambda ramp 0 -> 1 (continuous, no frozen-CG break) ---
fix_modify bm active yes
run ${ramp_steps}
print "RAMP done step=$(step) T=$(c_at_temp) lambda=$(f_bm) Ebond=$(ebond) Eangle=$(eangle)"

# --- Stage 3: lambda=1 production ---
run ${prod_steps}
print "PRODUCTION done step=$(step) T=$(c_at_temp) lambda=$(f_bm) Ebond=$(ebond) Eangle=$(eangle)"

write_data pet_hybrid.data
